read Hertz.frd

ulin Prescribed displacement
rot -z
view disp
ds 2 e 7
plot fv all
frame
hcpy png SE_dc

ulin Prescribed load
ds 7 e 7
plot fv all
hcpy png SE_pc

zoom 10
tra u 55
tra l 5
view elem
plot fv all
hcpy png SE_pc-zoom

ulin Prescribed displacement
ds 2 e 7
plot fv all
hcpy png SE_dc-zoom
