read Kasten.frd
rot y
rot r 30
rot u 20
view disp
view elem
frame
zoom 0.9
rep all
ds -0 e 1
#ds -0
plot f all n
hcpy png
sys cp hcpy_1.png deformed.png

ds 1 e 4
scal d 100
plot fv all
hcpy png
sys cp hcpy_2.png imperfection.png

# create force-displacement curve
sys dat2txt.py Kasten
sys gnuplot df.gpl
