read static.frd new

ds -3 e 4
seta base f all

copy all new mir x
copy all new mir y
copy all new mir z

view disp
view elem

plot f all n
plus fv base
rot -z
rot c -100
rot d 65
frame
hcpy png
sys mv hcpy_1.png expanded.png
