read Tjoint.frd new

ds -0 e 7
view disp
view elem
scal d 20

seta quarter all
copy all newc mir x
copy all newz mir z

frame
rot -z
zoom 4
rot r 6
rot u 6
tra u 20

plot f all n
plus fv quarter
hcpy png
sys mv hcpy_1.png SE_expanded.png
