read solve.frd new
read solve.inp nom
#max 2.5 f
rot x
frame
rot c 40
rot d 60
view elem
zoom 1.3
min 0 f l
max 2 f l

# create screen shots
view disp
scal d 1000

ds 2 e 1
hcpy png
sys mv hcpy_1.png Refs/start.png

ds 71 e 1
hcpy png
sys mv hcpy_2.png Refs/end_of_excitation.png

ds 149 e 1
hcpy png
sys mv hcpy_3.png Refs/end.png

# time history plots
graph * amp
graph Nhist time DISP D1
